// COMSOL Multiphysics 5.6.0.401 model "h7-version2.mph"
// Outline of the model tree
// Components: comp1 "Component 1", comp2 "Component 2"

Parameters
  b = 1
  dx = 0.01[cm]  // x axis step
  N = 10[cm]  // length
  a = 1.23  // tapering
  w = 2.5[cm]  // width

Geometry
  geom1 "Geometry 1" [comp1] (2D, length unit m)
    pc1: ParametricCurve | parmax = 1.25; coord = {s [cm], (a-2.5-a*cos((s-1.25)*2*pi*b/5)) [cm]}
    pc3: ParametricCurve | parmin = 8.75; parmax = 10; coord = {s[cm], (a-2.5-a*cos(-(s-8.75)*2*pi*b/5))[cm]}
    pc4: ParametricCurve | parmin = 2.5; parmax = 7.5; coord = {s [cm], (a-2.5+a*cos((s-5)*2*pi*b/5)) [cm]}
    pol1: Polygon
      type = open
      source = table
      table = 
        {0.0125, (a-2.5-a*cos((1.25-1.25)*2*pi*b/5)) [cm]}
        {0.025, (a-2.5+a*cos((2.5-5)*2*pi*b/5)) [cm]}
    pol2: Polygon
      type = open
      source = table
      table = 
        {0.075, (a-2.5+a*cos((7.5-5)*2*pi*b/5)) [cm]}
        {0.0875, (a-2.5-a*cos(-(8.75-8.75)*2*pi*b/5))[cm]}
    pol3: Polygon
      type = open
      source = table
      table = 
        {0, (a-2.5-a*cos((0-1.25)*2*pi*b/5)) [cm]}
        {0, 0}
        {0.1, 0}
        {0.1, (a-2.5-a*cos(-(10-8.75)*2*pi*b/5))[cm]}
    uni1: Union | input = pc1, pc3, pc4, pol1, pol2, pol3
    csol1: ConvertToSolid | input = uni1
    fin: Finalize "Form Union"
  geom2 "Geometry 2" [comp2] (3D, length unit m)
    wp1: WorkPlane | unite = on; workplane3d = off
      imp1: Import | type = sequence; sequence = geom1
    ext1: Extrude | workplane = wp1; input = wp1; distance = 0.025
    del1: Delete "Delete Entities 1" | input = ext1(1) boundaries 6
    fin: Finalize "Form Union"
    ige1: IgnoreEdges | input = fin(1) edges 9, 12, 18, 24
    igv1: IgnoreVertices | input = ige1(1) points 5-8

Materials
  mat2: Common "Brazilian Rosewood" [comp2] on all domains
    def "Basic"
      youngsmodulus = 13.9e9
      poissonsratio = 0.046
      density = 835

Physics
  solid: SolidMechanics [geom2] on all domains
    dependent variable u = {u, v, w}
    lemm1: LinearElasticModel "Linear Elastic Material 1" (default)
    free1: Free (default)
    init1: init "Initial Values 1" (default)

Mesh
  mesh2 "Mesh 2" [geom2]
    size: MeshSizeDefault | hauto = 2
    ftri1: FreeTri "Free Triangular 1" on remaining entities
  mesh3 "Mesh 1" [geom1]
    size: MeshSizeDefault | hmax = 0.0067; hmin = 3.0E-5; hcurve = 0.3; hgrad = 1.3
    ftri1: FreeTri "Free Triangular 1" on remaining entities

Studies
  std1 "Study 1"
    param: Parametric "Parametric Sweep" | pname = a; plistarr = range(0.1,0.1,1.2)
    eig: Eigenfrequency | neigs = 5

Solver configurations
  sol1 "Solution 1" (study std1)
    v1: Variables "Dependent Variables 1"
    e1: Eigenvalue "Eigenvalue Solver 1" | eigvfunscale = maximum; eigvfunscaleparam = 1.06E-7
      dDef: Direct
  sol2 "Parametric Solutions 1" (study std1)

Datasets
  dset1: Solution | solution = sol1
  dset2: Solution | solution = sol2